# Example AdResS simulation input script
# This demonstrates basic usage of the AdResS package

units           real
atom_style      atomic
dimension       3
boundary        p p p

# Create simulation box
region          box block -20.0 20.0 -10.0 10.0 -10.0 10.0
create_box      1 box

# Define AdResS regions
region          atomistic block -10.0 10.0 -10.0 10.0 -10.0 10.0
region          transition block -12.0 -10.0 -10.0 10.0 -10.0 10.0
region          cg block -20.0 -12.0 -10.0 10.0 -10.0 10.0

# Create atoms (placeholder - would use read_data or create_atoms)
# read_data      data.adres

# Pair interactions with AdResS force interpolation
# Atomistic: lj/cut with cutoff 2.5
# CG: lj/cut with cutoff 5.0 (longer range for CG)
pair_style      adress 10.0 lj/cut 2.5 lj/cut 5.0
pair_coeff      * * 1.0 1.0 2.5 fix adres_region

# AdResS fixes
# Transition along x-axis (default)
fix             1 all adress/region atomistic transition cg x
fix             2 all adress/thermo transition 2.0 fix 1

# Integration
fix             3 all nve

# Output
compute         1 all adress/stats 1
thermo_style    custom step temp pe ke c_1[1] c_1[2] c_1[3]
thermo          100

# Run
timestep        0.001
run             1000
